<?xml version="1.0" encoding="utf-8"?>

<propeller name="Zeppelin 5.5m 2-bladed wooden propeller">

	<documentation>
		JavaProp: Designed for max power and RPM at 93 kph.
		#blades 2
		n          500 RPM
		D          5.50 m
		Spinner D  0.20 m
		Velocity   25.8 m/s
		Power      178967.97 W

		Airfoil
		Clark Y, Re=500000
		Clark Y, Re=500000
		Clark Y, Re=500000
		Flat plate, Re=500000

	</documentation>

	<documentation>
		The intertia is assumed to be
		n * 1/3*m_b*(d^2)/4
		where
		n is the number of blades,
		m_b is the mass of a blade and
		d is the diameter.

		2/3 of the total propeller weight is assumed to be in the blades.
	</documentation>

	<ixx> 300.3 </ixx>
	<diameter unit="M">5.5</diameter>
	<numblades> 2.0 </numblades>
	<gearratio> 2.79 </gearratio>
	<maxrpm> 500.00 </maxrpm>
<!--
	<table name="C_THRUST" type="internal">
		<tableData>
			0.000	0.100535
			0.050	0.103909
			0.100	0.101576
			0.150	0.100805
			0.200	0.100220
			0.250	0.099048
			0.300	0.097355
			0.350	0.094909
			0.400	0.091715
			0.450	0.087623
			0.500	0.082432
			0.550	0.074618
			0.600	0.065416
			0.650	0.056019
			0.700	0.046405
			0.750	0.036513
			0.800	0.026354
			0.810	0.024292
			0.820	0.022219
			0.830	0.020136
			0.840	0.018042
			0.850	0.015940
			0.860	0.013828
			0.870	0.011707
			0.880	0.009577
			0.890	0.007414
			0.900	0.005294
			0.910	0.003086
			0.920	0.000921
			0.930	-0.001239
			0.940	-0.003460
			0.950	-0.005718
		</tableData>
	</table>

	<table name="C_POWER" type="internal">
		<tableData>
			0.000	0.066052
			0.050	0.066621
			0.100	0.069299
			0.150	0.067570
			0.200	0.064805
			0.250	0.064082
			0.300	0.063355
			0.350	0.063020
			0.400	0.062484
			0.450	0.061589
			0.500	0.060110
			0.550	0.056795
			0.600	0.052122
			0.650	0.046795
			0.700	0.040777
			0.750	0.034005
			0.800	0.026458
			0.810	0.024856
			0.820	0.023223
			0.830	0.021561
			0.840	0.019869
			0.850	0.018148
			0.860	0.016398
			0.870	0.014618
			0.880	0.012810
			0.890	0.010948
			0.900	0.009099
			0.910	0.007149
			0.920	0.005211
			0.930	0.003252
			0.940	0.001212
			0.950	-0.000890
		</tableData>
	</table>
-->
	<table name="C_THRUST" type="internal">
		<tableData>
			0.000	0.068857
			0.100	0.068077
			0.200	0.068177
			0.300	0.068204
			0.400	0.069121
			0.500	0.069718
			0.600	0.068504
			0.700	0.063399
			0.800	0.054973
			0.900	0.044748
			1.000	0.034314
		</tableData>
	</table>

	<table name="C_POWER" type="internal">
		<tableData>
			0.000	0.053719
			0.100	0.058788
			0.200	0.059037
			0.300	0.059726
			0.400	0.053993
			0.500	0.051613
			0.600	0.051930
			0.700	0.052094
			0.800	0.049736
			0.900	0.044686
			1.000	0.037802
		</tableData>
	</table>

</propeller>
